ORIGIN ≡ 1
K(A, B) :=
    n ← rows(A)
    m ← cols(A)
    u ← rows(B)
    v ← cols(B)
    if m == u
        C[n, v] ← 0
        for i ∈ 1 .. n
            for j ∈ 1 .. v
                S ← 0
                for k ∈ 1 .. m
                    S ← S + A[i, k]*B[k, j]
                C[i, j] ← S
        C
    0 otherwise
B := [6; 5]
A := [2, 1; 3, 2; 4, 1]
K(A, B) = [17; 28; 29]
