ORIGIN ≡ 1
A(n) :=
    for i ∈ 1 .. n
        for j ∈ 1 .. n
            A[j, i] ← (i - 1)*n + j
    A
A(4) = [1, 5, 9, 13; 2, 6, 10, 14; 3, 7, 11, 15; 4, 8, 12, 16]
A(5) = [1, 6, 11, 16, 21; 2, 7, 12, 17, 22; 3, 8, 13, 18, 23; 4, 9, 14, 19, 24; 5, 10, 15, 20, 25]
