f(x) := x^2 - 5*x + 6
f(x) solve → [2; 3]
b := f(x) coeffs → [6; -5; 1]
a := 1
b := [6; -7; 8; -9; -10; 11]
polyroots(b) = [-1.13606; 0.00551802 + 0.69113i; 0.00551802 - 0.69113i; 0.84586; 1.18826]
f(y) := y^3 + 0.4*y + 2
f(y) solve → [-1.15436387343; 0.577181936714 - 1.18296955337i; 0.577181936714 + 1.18296955337i]
g(x) := ln(x) - sin(x)
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x := 2
root(g(x), x) = 2.21911
v(t) := ln(t) - tan(t)
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t := 7
root(v(t), t) = 7.39037
