b := [3; 6; 7]
A := [2, 4, 5; 1, 3, 6; 1, 4, 5]
|A| = -9
X := [0, 2, 5; 1, 0, 6; 1, 0, 5]
R(A, i) :=
    if A[i, i] == 0
        for k ∈ i + 1 .. rows(A)
            if A[k, i] ≠ 0
                x ← k
                for j ∈ 1 .. cols(A)
                    a ← A[i, j]
                    A[i, j] ← A[x, j]
                    A[x, j] ← a
                break
    A
d := [0, 2, 5; 1, 4, 9]
X^-1*b = [12; 4; -1]
if A[k, i] ≠ 0
    x ← A[i]
    A[i] ← A[k]
    A[k] ← x
break
R(d) = ƒ(Unitless) → [Unitless]
R(X, 2) = [0, 2, 5; 1, 0, 6; 1, 0, 5]
ORIGIN ≡ 1
Gaus(A, B) :=
    A ← augment(A, B)
    for i ∈ 1 .. rows(A) - 1
        k ← A[i, i]
        for j ∈ 1 .. cols(A)
            A[i, j] ← A[i, j]/k
        for h ∈ i + 1 .. rows(A)
            t ← A[h, i]
            for m ∈ 1 .. cols(A)
                A[h, m] ← A[h, m] - A[i, m]*t
    m ← rows(A)
    n ← cols(A)
    x[m] ← A[m, n]/A[m, n - 1]
    for i ∈ m - 1 .. 1
        x[i] ← (A[i, n] - sum(A[i, j]*x[j], j = i + 1 .. m))/A[i, i]
    x
Gaus(A, b) = [-4; 1.77778; 0.777778]
Gaus(C, D) =  # error: This variable is undefined.
det(A) :=
    T ← 1
    for i ∈ 1 .. rows(A) - 1
        k ← A[i, i]
        T ← T*k
        for j ∈ 1 .. cols(A)
            A[i, j] ← A[i, j]/k
        for h ∈ i + 1 .. rows(A)
            t ← A[h, i]
            for m ∈ 1 .. cols(A)
                A[h, m] ← A[h, m] - A[i, m]*t
    t ← rows(A)
    T*A[t, t]
det(C) =  # error: This value has units: Charge, but must have units: Unitless.
det(A) = -9
Gauss(A, B) :=
    T ← 1
    A ← augment(A, B)
    for i ∈ 1 .. rows(A) - 1
        A ← R(A, i) if A[i, i] == 0
        k ← A[i, i]
        T ← T*k
        return 0 if k == 0
        for j ∈ 1 .. cols(A)
            A[i, j] ← A[i, j]/k
        for h ∈ i + 1 .. rows(A)
            t ← A[h, i]
            for m ∈ 1 .. cols(A)
                A[h, m] ← A[h, m] - A[i, m]*t
    m ← rows(A)
    n ← cols(A)
    T ← T*A[m, n - 1]
    return 0 if T == 0
    otherwise
        x[m] ← A[m, n]/A[m, n - 1]
        for i ∈ m - 1 .. 1
            x[i] ← (A[i, n] - sum(A[i, j]*x[j], j = i + 1 .. m))/A[i, i]
    x
C := [0, 13; 10, 5]
D := [8; 5]
x[m] ← A[m, n]/A[m, n - 1]
Gauss(C, D) = [0.192308; 0.615385]
C^-1*D = [0.192308; 0.615385]
