a := 2
AB(A, b, k) :=
    for i ∈ 0 .. rows(A) - 1
        A[i, k] ← b[i]
    A
T(A, b, k) :=
    A[:, k] ← b
    A
b := [6; 61; 6]
A := [11, 4, 3; 4, 15, 6; 1, 81, 9]
|A| = -3054
T(A, b, 1) = [11, 6, 3; 4, 61, 6; 1, 6, 9]
AB(A, b, 1) = [11, 6, 3; 4, 61, 6; 1, 6, 9]
KR(A, b) :=
    for i ∈ 0 .. rows(A) - 1
        C ← A
        B[i] ← |AB(C, b, i)|/|A|
    B  # Kr kramer
KR(A, b) = [-3.40373; -1.75246; 16.817]
