L(x, y, t) :=
    N ← rows(y) - 1
    L ← sum(if(k == 0, 1, product((t - x[j])/(x[k] - x[j]), j = 0 .. k - 1))*if(k == N, 1, product((t - x[j])/(x[k] - x[j]), j = k + 1 .. N))*y[k], k = 0 .. N)
x := [1; 3; 4]
y := [1; 2; 1]
f(x) := (-x^2 + 5*x - 2)/2
f(2) = 2
L(x, y, 2) = 2
a := -5
b := 5
N := 10
h := (b - a)/N
i := 0 .. N
x[i] := a + h*i
y[i] := sin(x[i])
M := 100
h := (b - a)/M
j := 0 .. M
r[j] := a + h*j
T[j] := L(x, y, r[j])
sin(r[j]) = [
    0.958924; 0.982453; 0.996165; 0.999923; 0.993691; 0.97753; 0.951602; 0.916166; 0.871576; 0.818277
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]
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T = [
    0.958924; 0.986468; 1.00204; 1.00622; 0.999532; 0.982429; 0.955357; 0.918765; 0.873126; 0.818952
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]
R[j] := |sin(r[j]) - T[j]|
R = [
    0; 0.00401494; 0.00587132; 0.00629774; 0.00584055; 0.00489901; 0.00375513; 0.002599; 0.00155002; 0.000674483
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]
