Nyuton1(x, f, t) :=
    for i ∈ 0 .. rows(f) - 1
        a[i, 0] ← f[i]
    for j ∈ 1 .. rows(f) - 1
        for i ∈ 0 .. rows(f) - 1 - j
            a[i, j] ← a[i + 1, j - 1] - a[i, j - 1]
    A ← a
    h ← x[1] - x[0]
    S ← A[0, 0]
    k ← 1
    for i ∈ 0 .. rows(f) - 2
        k ← k*((t - x[0])/h - i)
        S ← S + k/(i + 1)!*A[0, i + 1]
    S
Nyuton(x, f, t) :=
    for i ∈ 0 .. rows(f) - 1
        a[i, 0] ← f[i]
    for j ∈ 1 .. rows(f) - 1
        for i ∈ 0 .. rows(f) - 1 - j
            a[i, j] ← a[i + 1, j - 1] - a[i, j - 1]
    A ← a
    h ← x[1] - x[0]
    A[0, 0] + sum(product((t - x[0])/h - j, j = 0 .. i)/(i + 1)!*A[0, i + 1], i = 0 .. rows(f) - 2)
x := [1; 2; 3; 4]
f := [1; 4; 9; 16]
Nyuton(x, f, 1.5) = 2.25
F(t) := Nyuton1(x, f, t) simplify → t^2
x1 := [0; 1; 2; 3; 4]
y1 := [1; -3; -23; -53; 1]
F(t) := Nyuton1(x1, y1, t) simplify → 11*t^4/3 - 21*t^3 + 88*t^2/3 - 16*t + 1
F(3) = -53
Nyuton(x1, y1, 3) = -53
