ORIGIN ≡ 1
A(n) :=
    for i ∈ 1 .. n
        for j ∈ 1 .. n
            A[i, j] ← j
    A
B(n) :=
    k ← 1
    for i ∈ 1 .. n
        for j ∈ 1 .. n
            A[i, j] ← k
            k ← k + 1
    A
A(4) = [1, 2, 3, 4; 1, 2, 3, 4; 1, 2, 3, 4; 1, 2, 3, 4]
B(4) = [1, 2, 3, 4; 5, 6, 7, 8; 9, 10, 11, 12; 13, 14, 15, 16]
C(n) :=
    k ← 1
    for i ∈ 1 .. n
        if mod(i, 2) ≠ 0
            for j ∈ 1 .. n
                A[i, j] ← k
                k ← k + 1
        otherwise
            for j ∈ 1 .. n
                A[i, n + 1 - j] ← k
                k ← k + 1
    A
A(8) = [
    1, 2, 3, 4, 5, 6, 7, 8;
    1, 2, 3, 4, 5, 6, 7, 8;
    1, 2, 3, 4, 5, 6, 7, 8;
    1, 2, 3, 4, 5, 6, 7, 8;
    1, 2, 3, 4, 5, 6, 7, 8;
    1, 2, 3, 4, 5, 6, 7, 8;
    1, 2, 3, 4, 5, 6, 7, 8;
    1, 2, 3, 4, 5, 6, 7, 8
]
C(4) = [1, 2, 3, 4; 8, 7, 6, 5; 9, 10, 11, 12; 16, 15, 14, 13]
C(3) = [1, 2, 3; 6, 5, 4; 7, 8, 9]
