ORIGIN ≡ 1
S(n) :=
    for i ∈ 1 .. n
        for j ∈ 1 .. n
            k ← min(i - 1, j - 1, n - i, n - j)
            m ← n - 2*k
            p ← 4*k*(n - k)
            A[i, j] ← p + j - k if i == 1 + k
            otherwise
                A[i, j] ← p + m - 1 + i - k if j == n - k
                otherwise
                    A[i, j] ← p + 2*m - 2 + (n - k) - j + 1 if i == n - k
                    A[i, j] ← p + 3*m - 3 + (n - k) - i + 1 otherwise
    A
S(5) = [1, 2, 3, 4, 5; 16, 17, 18, 19, 6; 15, 24, 25, 20, 7; 14, 23, 22, 21, 8; 13, 12, 11, 10, 9]
S(4) = [1, 2, 3, 4; 12, 13, 14, 5; 11, 16, 15, 6; 10, 9, 8, 7]
