S(n) :=
    for i ∈ 0 .. n - 1
        for j ∈ 0 .. n - 1
            k ← min(i, j, n - i - 1, n - j - 1)
            m ← n - 2*k
            p ← 4*k*(n - k) + 1
            A[i, j] ← p + j - k if i == k
            otherwise
                A[i, j] ← p + m - 1 + i - k if j == n - k - 1
                otherwise
                    A[i, j] ← p + 2*m - 2 + (n - 1 - k) - j if i == n - k - 1
                    A[i, j] ← p + 3*m - 3 + (n - k - 1) - i otherwise
    A
S(4) = [1, 2, 3, 4; 12, 13, 14, 5; 11, 16, 15, 6; 10, 9, 8, 7]
S(3) = [1, 2, 3; 8, 9, 4; 7, 6, 5]
S(9) = [
    1, 2, 3, 4, 5, 6, 7, 8, 9;
    32, 33, 34, 35, 36, 37, 38, 39, 10;
    31, 56, 57, 58, 59, 60, 61, 40, 11;
    30, 55, 72, 73, 74, 75, 62, 41, 12;
    29, 54, 71, 80, 81, 76, 63, 42, 13;
    28, 53, 70, 79, 78, 77, 64, 43, 14;
    27, 52, 69, 68, 67, 66, 65, 44, 15;
    26, 51, 50, 49, 48, 47, 46, 45, 16;
    25, 24, 23, 22, 21, 20, 19, 18, 17
]
