A := [1, 3, 5; 1, 3, 47; -12, 10, 4]
E := identity(rows(A))
E = [1, 0, 0; 0, 1, 0; 0, 0, 1]
f(x) := |A - E*x|
f(x) → 8*x^2 - x^3 + 394*x - 1932
a := f(x) coeffs → [-1932; 394; 8; -1]
polyroots(a) = [-18.6612; 4.71813; 21.9431]
