n := 100
a := -1
b := 1
h := (b - a)/n
h := 0.02
i := 0 .. n
p[i] := a + i*h
p = [
    -1; -0.98; -0.96; -0.94; -0.92; -0.9; -0.88; -0.86; -0.84; -0.82
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]
f(x) := x^2
f(p) = [
    1; 0.9604; 0.9216; 0.8836; 0.8464; 0.81; 0.7744; 0.7396; 0.7056; 0.6724
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]
f(x) := e^x - x^2
n := 10
g(x) := d/dx(f(x))
x[0] := -1
i := 0 .. n
x[i + 1] := x[i] - f(x[i])/g(x[i])
x = [-1; -0.733044; -0.703808; -0.703467; -0.703467; -0.703467; -0.703467; -0.703467; -0.703467; -0.703467; -0.703467; -0.703467]
Nyu(f, a, e) :=
    g(x) ← d/dx(f(x))
    while |f(a)| > e
        a ← f(a)/g(a)
    a
Nyu(f, -1, 0.000003)
