f := [6; 12; 40.5; 0; 0; 18; 0; 0; 10.5]
A := [
    4, -1, 0, -1, 0, 0, 0, 0, 0;
    -1, 4, -1, 0, -1, 0, 0, 0, 0;
    0, -1, 4, 0, 0, -1, 0, 0, 0;
    -1, 0, 0, 4, -1, 0, -1, 0, 0;
    0, -1, 0, -1, 4, -1, 0, -1, 0;
    0, 0, -1, 0, -1, 4, 0, 0, -1;
    0, 0, 0, -1, 0, 0, 4, -1, 0;
    0, 0, 0, 0, -1, 0, -1, 4, -1;
    0, 0, 0, 0, 0, -1, 0, -1, 4
]
x := A^-1*f = [4.86161; 9.9375; 15.5759; 3.50893; 7.3125; 11.8661; 1.86161; 3.9375; 6.57589]
