f(x) := 2*x^3 - 2*x - 1
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Nyu(f, a, e) :=
    g(x) ← d/dx(f(x))
    i ← 0
    while |f(a)| > e
        i ← i + 1
        a ← a - f(a)/g(a)
    r[0] ← a
    r[1] ← i
    r
Nyu(f, 1, 0.000000000000001) = [1.19149; 5]
