f(x) := sin(e^x) - x^22
Nyu(f, a, e) :=
    g(x) ← d/dx(f(x))
    i ← 0
    while |f(a)| > e
        i ← i + 1
        a ← a - f(a)/g(a)
    r[0] ← a
    r[1] ← i
    r
Nyu(f, -1, 0.000000000000001) = [-0.956384; 6]
