A := [3, 4, 2; 43, -9, 1; 0, 24, 14]
B := [2; 3; -56]
|A| = -794
x := A^-1*B
A[:, 2] = [2; 1; 14]
x = [1.9597; 7.21159; -16.3627]
transpose(A) = [3, 43, 0; 4, -9, 24; 2, 1, 14]
max(A) = 43
min(B) = -56
