A := [2, 13, 323; 134, -10, 232323; 121, 21, 121]
Max(A) :=
    k ← A[0, 0]
    x ← 0
    y ← 0
    for i ∈ 0 .. rows(A) - 1
        for j ∈ 0 .. cols(A) - 1
            if A[i, j] > k
                k ← A[i, j]
                x ← i
                y ← j
    k
Max(A) = 232323
