f(x) := e^x - x^2
TE(f, a, b, e) :=
    i ← 0
    while |f(a)| > e
        t ← (a + b)/2
        i ← i + 1
        b ← t if f(a)*f(t) < 0
        a ← t otherwise
        r[i] ← a
    r[0] ← a
    r
TE(f, -1, 1, 0.000000000000000000001) = [
    -0.703467; -1; -1; -0.75; -0.75; -0.75; -0.71875; -0.71875; -0.710938; -0.707031
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]
y(x) := x^2 - 4
TE(y, 0, 3, 0.0001) = [1.99999; 1.5; 1.5; 1.875; 1.875; 1.96875; 1.96875; 1.99219; 1.99219; 1.99805; 1.99805; 1.99951; 1.99951; 1.99988; 1.99988; 1.99997; 1.99997; 1.99999]
